*Heading
** Job name: J_8000 Model name: Model-1
** Generated by: Abaqus/CAE 6.13-1
*Preprint, echo=NO, model=NO, history=NO, contact=NO
**
** PARTS
**
*Part, name=Part-1
*Node
      1,          20.,          20.,          20.
      2,          20.,          19.,          20.
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*Element, type=C3D8R
   1,  442,  443,  464,  463,    1,    2,   23,   22
   2,  443,  444,  465,  464,    2,    3,   24,   23
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*Elset, elset=_PickedSet, internal, generate
	1, 8000,	 1
*Solid Section, elset=_PickedSet, material=Material-1
1.,
*End Part
**
**
** ASSEMBLY
**
*Assembly, name=Assembly
**
*Instance, name=Part-1-1, part=Part-1
*End Instance
**
*Nset, nset=Set-Y-Loading, instance=Part-1-1,generate
    1,  9241,    21
*Elset, elset=Set-Y-Loading, instance=Part-1-1,generate
    1,  7981,    20
*Nset, nset=Set-Y-RF, instance=Part-1-1,generate
   21,  9261,    21
*Elset, elset=Set-Y-RF, instance=Part-1-1,generate
   20,  8000,    20
*Nset, nset=Set-1, instance=Part-1-1,generate
	1,  9261,	 1
*Elset, elset=Set-1, instance=Part-1-1,generate
	1,	8000,	 1
*Elset, elset=FCC-LD200, instance=Part-1-1
     72,    247,    332,    387,
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
*Elset, elset=FCC-TD200, instance=Part-1-1
      1,     80,    246,    363,
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
*Elset, elset=FCC-LD220, instance=Part-1-1
     40,    174,    219,    266,
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**
*End Assembly
**
** MATERIALS
**
*Material, name=Material-1
** ATTENTION!! Eight paramters per line!
*USER MATERIAL, CONSTANTS=22
243.5E9,170.3E9,124.2E9,0.001,0.021,650.E6,0.1E9,800.E6,
2.0,1.4,285.3E9,262.1E9,131.8E9,0.001,0.021,490.E6,
8.E9,850.E6,0.7,1.4,1000,1000
*DEPVAR
18
*DENSITY
1.E8
** ----------------------------------------------------------------
**
** STEP: Step-1
**
*Step, name=Step-1, nlgeom=YES
*Dynamic, Explicit
, 112.
*Bulk Viscosity
0.06, 1.2
**
** BOUNDARY CONDITIONS
*Boundary, type=VELOCITY
Set-Y-Loading, 2,2, 0.02
*Boundary
Set-Y-RF, 2, 2
**
** OUTPUT REQUESTS
**
*Restart, write, number interval=1, time marks=NO
**
** FIELD OUTPUT: F-Output-1
**
*Output, field, variable=ALL, number interval=200
**
** HISTORY OUTPUT: H-Output-1
**
*Output, history
*Node Output, nset=Set-Y-Loading
RF2, U2
*Element Output, elset=Set-1
SDV11
*End Step
