*Heading
** Job name: Job-inclusion Model name: Model-1
** Generated by: Abaqus/CAE 2021
*Preprint, echo=NO, model=NO, history=NO, contact=NO
**
** PARTS
**
*Part, name=Part-1
*Node
      1,   16.5880966,   24.9967022,           1.
      2,  -16.5880966,   24.9967022,           1.
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*Element, type=C3D8R
  1,    8,  137,  869,  173,    1,   39,  695,  108
  2,  137,  136,  870,  869,   39,   40,  696,  695
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*Nset, nset=Set-FCC
    1,    2,    3,    4,    5,    6
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*Elset, elset=Set-FCC
   1,   2,   3,   4,   5,   6
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*Nset, nset=Set-BCC
    1,    2,    3,    4,    5,    6
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*Elset, elset=Set-BCC
 361, 362, 363, 364, 365, 366
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*Nset, nset=Set-Matrix
    1,    2,    3,    4,    5,    6
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*Elset, elset=Set-Matrix, generate
  991,  1551,     1
*Nset, nset=Set-X-SYM
  32,  33,  37,  38, 618, 619
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*Elset, elset=Set-X-SYM
 1031, 1090, 1097, 1460, 1480, 1490, 1497, 1500, 1515, 1517, 1522, 1530
*Nset, nset=Set-Y-SYM
  31,  32,  36,  37, 607, 608
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*Elset, elset=Set-Y-SYM
 1090, 1115, 1116, 1401, 1425, 1426, 1451, 1494, 1501, 1524, 1529, 1531
*Nset, nset=Set-Z-SYM
    1,    2,    3,    4,    9,   10
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*Elset, elset=Set-Z-SYM, generate
    1,  1551,     1
*Nset, nset=Set-X-RF
  31,  34,  35,  36, 640, 641
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*Elset, elset=Set-X-RF
 1049, 1106, 1116, 1445, 1462, 1473, 1482, 1486, 1496, 1499, 1502, 1505
*Nset, nset=Set-Y-RF
  33,  34,  35,  38, 629, 630
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*Elset, elset=Set-Y-RF
 1097, 1106, 1356, 1455, 1471, 1484, 1514, 1519, 1523, 1528, 1532, 1534
** Section: Section-1
*Solid Section, elset=Set-FCC, material=Material-1
,
** Section: Section-1
*Solid Section, elset=Set-BCC, material=Material-1
,
** Section: Section-2
*Solid Section, elset=Set-Matrix, material=Material-Matrix
,
*End Part
**
**
** ASSEMBLY
**
*Assembly, name=Assembly
**
*Instance, name=Part-1-1, part=Part-1
*End Instance
**
*End Assembly
**
** MATERIALS
**
*Material, name=Material-1
*USER MATERIAL, CONSTANTS=22
243.5E9,170.3E9,124.2E9,0.001,0.001,550.E6,1.0E9,600.E6,
0.7,1.4,285.3E9,262.1E9,131.8E9,0.001,0.001,475.E6,
4.E9,750.E6,0.7,1.4,1000,1000
*DEPVAR
18
*DENSITY
1.E2
*Material, name=Material-Matrix
*Density
1000.,
*Elastic
 1.7e+11, 0.3
*Plastic
 1.2e+09,   0.
 1.6e+09, 0.14
** ----------------------------------------------------------------
**
** STEP: Step-1
**
*Step, name=Step-1, nlgeom=YES
*Dynamic, Explicit
, 100.
*Bulk Viscosity
0.06, 1.2
**
** BOUNDARY CONDITIONS
**
** Name: BC-1 Type: Symmetry/Antisymmetry/Encastre
*Boundary
Part-1-1.Set-X-SYM, XSYMM
** Name: BC-2 Type: Velocity/Angular velocity
*Boundary, type=VELOCITY
Part-1-1.Set-X-RF, 1, 1, 0.12
**
** OUTPUT REQUESTS
**
*Restart, write, number interval=1, time marks=NO
**
** FIELD OUTPUT: F-Output-1
**
*Output, field, variable=PRESELECT
**
** HISTORY OUTPUT: H-Output-1
**
*Output, history, variable=PRESELECT
*Node Output, nset=Part-1-1.Set-X-RF
RF1, U1
*Element Output, elset=Part-1-1.Set-FCC
LE11, S11
*Element Output, elset=Part-1-1.Set-BCC
LE11, S11
*End Step
