*Heading
** Job name: Job-1 Model name: Model-1
** Generated by: Abaqus/CAE 6.14-5
*Preprint, echo=NO, model=NO, history=NO, contact=NO
**
** PARTS
**
*Part, name=Part-1
*Node
      1,           1.,           1.,           1.
      2,           1.,  0.800000012,           1.
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*Element, type=C3D8R
  1,  37,  38,  44,  43,   1,   2,   8,   7
  2,  38,  39,  45,  44,   2,   3,   9,   8
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*Nset, nset=Set-1, generate
   1,  216,    1
*Elset, elset=Set-1, generate
   1,  125,    1
*Nset, nset=X+, generate
  1,  36,   1
*Elset, elset=X+, generate
  1,  25,   1
*Nset, nset=X-, generate
 181,  216,    1
*Elset, elset=X-, generate
 101,  125,    1
*Nset, nset=Y+, generate
   1,  211,    6
*Elset, elset=Y+, generate
   1,  121,    5
*Nset, nset=Y-, generate
   6,  216,    6
*Elset, elset=Y-, generate
   5,  125,    5
*Nset, nset=Z+
   1,   2,   3,   4,   5,   6
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*Elset, elset=Z+
   1,   2,   3,   4,   5,  26
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*Nset, nset=Z-
  31,  32,  33,  34,  35,  36
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*Elset, elset=Z-
  21,  22,  23,  24,  25,  46
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** Section: Section-1
*Solid Section, elset=Set-1, material=Material-1
,
*End Part
**
**
** ASSEMBLY
**
*Assembly, name=Assembly
**
*Instance, name=Part-1-1, part=Part-1
*End Instance
**
*End Assembly
*Amplitude, name=Amp-1, definition=EQUALLY SPACED, fixed interval=5.
0.
0.125
0.250
0.375
0.5
0.625
0.75
0.875
1.0
1.125
1.25
**
** MATERIALS
**
*Material, name=Material-1
*User Material, type=MECHANICAL,constants=25
204.6E3, 137.7E3, 126.2E3, 45.0, 90.0, 0.0, 0.001, 0.02,
110.,320.,447.,0.7,1.0,1.4,11.4E4,5.E-1,
5.E-1, 0.8, 3.0E3, 0.284E-3, 126.E3, 1.7E3, 54,-27,
-27
*Depvar
93
*Density
1.E2
*User Defined Field
*Initial Condition, type=field, variable=1
Part-1-1.Set-1, 1.27e-25
** ----------------------------------------------------------------
**
** STEP: Step-1
**
*Step, name=Step-1, nlgeom=YES
*Dynamic, Explicit
, 20
*Bulk Viscosity
0.06, 1.2
**
** BOUNDARY CONDITIONS
**
** Name: X--1 Type: Symmetry/Antisymmetry/Encastre
*Boundary
Part-1-1.X-, XSYMM
** Name: Y--1 Type: Symmetry/Antisymmetry/Encastre
*Boundary
Part-1-1.Y-, YSYMM
** Name: Z--1 Type: Symmetry/Antisymmetry/Encastre
*Boundary
Part-1-1.Z-, ZSYMM
**
** OUTPUT REQUESTS
**
*Restart, write, number interval=1, time marks=NO
**
** FIELD OUTPUT: F-Output-1
**
*Output, field
*Element Output
 E, S, SDV
*Node Output
 U, RF
**
** HISTORY OUTPUT: H-Output-1
**
*Output, history
*Node Output, nset=Part-1-1.X+
RF1, U1
*Element Output, elset=Part-1-1.Y+
E22, S22
*Node Output, nset=Part-1-1.Y+
RF2, U2
*Node Output, nset=Part-1-1.Z+
RF3, U3
*End Step
**--------------------------------------------
**
** STEP: Step-2
**
*Step, name=Step-2, nlgeom=YES
*Dynamic, Explicit
, 50
*Bulk Viscosity
0.06, 1.2
**
** BOUNDARY CONDITIONS
**
** Name: X--1 Type: Symmetry/Antisymmetry/Encastre
*Boundary, op=NEW
Part-1-1.X-, XSYMM
** Name: Y+-1 Type: Displacement/Rotation
*Boundary, amplitude=Amp-1, op=NEW
Part-1-1.Y+, 2, 2, 0.04
** Name: Y--1 Type: Symmetry/Antisymmetry/Encastre
*Boundary, op=NEW
Part-1-1.Y-, YSYMM
** Name: Z--1 Type: Symmetry/Antisymmetry/Encastre
*Boundary, op=NEW
Part-1-1.Z-, ZSYMM
**
** OUTPUT REQUESTS
**
*Restart, write, number interval=1, time marks=NO
**
** FIELD OUTPUT: F-Output-2
**
*Output, field
*Element Output
 E, S, SDV
*Node Output
 U, RF
**
** HISTORY OUTPUT: H-Output-2
**
*Output, history
*Node Output, nset=Part-1-1.X+
RF1, U1
*Element Output, elset=Part-1-1.Y+
E22, S22
*Node Output, nset=Part-1-1.Y+
RF2, U2
*Node Output, nset=Part-1-1.Z+
RF3, U3
*End Step
