*Heading
** Job name: j394 Model name: Model-1
** Generated by: Abaqus/CAE 6.13-1
*Preprint, echo=NO, model=NO, history=NO, contact=NO
**
** PARTS
**
*Part, name=Part-2
*Node
      1,           0., 0.0560468435, 0.000199999995
      2,           0., 0.00499999989, 0.000199999995
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*Element, type=C3D8
  1,   8,  68, 323,  90,   1,  15, 215,  56
  2,  68,  67, 324, 323,  15,  16, 216, 215
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*Nset, nset=Set-1, generate
   1,  866,    1
*Elset, elset=Set-1, generate
   1,  394,    1
*Elset, elset=_Surf-1_S2, internal, generate
 131,  150,    1
*Surface, type=ELEMENT, name=Surf-1
_Surf-1_S2, S2
** Section: Section-1-SET-1
*Solid Section, elset=Set-1, material=CP
,
*End Part
**
**
** ASSEMBLY
**
*Assembly, name=Assembly
**
*Instance, name=Part-2-1, part=Part-2
*End Instance
**
*Nset, nset=all, instance=Part-2-1, generate
   1,  866,    1
*Elset, elset=all, instance=Part-2-1, generate
   1,  394,    1
*Nset, nset=back, instance=Part-2-1
   5,   6,   7,   8,  11,  12
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*Elset, elset=back, instance=Part-2-1, generate
   1,  394,    1
*Nset, nset=crack, instance=Part-2-1
   2,   5,   9,  12,  13,  14
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*Elset, elset=crack, instance=Part-2-1
 131, 151, 171, 191, 211, 231
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*Nset, nset=front, instance=Part-2-1
   1,   2,   3,   4,   9,  10
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*Elset, elset=front, instance=Part-2-1, generate
   1,  394,    1
*Nset, nset=outer, instance=Part-2-1
   9,  10,  11,  12,  99, 100
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*Elset, elset=outer, instance=Part-2-1, generate
 131,  150,    1
*Nset, nset=sym, instance=Part-2-1
   3,   4,   6,   7,  36,  37
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*Elset, elset=sym, instance=Part-2-1
 118, 119, 120, 121, 122, 123
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*Nset, nset=tip, instance=Part-2-1
  2,  3,  5,  6, 27, 28
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*Elset, elset=tip, instance=Part-2-1, generate
  13,  130,   13
*End Assembly
*Amplitude, name=AMP-1, definition=SMOOTH STEP
             0.,              0.,          10000.,           1e-05,         130000.,              1.
** ELEMENT CONTROLS
**
**Section Controls, name=EC-1, hourglass=ENHANCED
**1., 1., 1.
**
** MATERIALS
**
*Material, name=CP
*Density
5.E4,
*Depvar
      83,
*User Material, constants=18, type=MECHANICAL
204.6E3,   137.E3,   126.2E3,  45., 90., 0.0, 1.0,   0.02,
50.0,   1000,   70.,  4.0,  1.0, 1.4, 60.0E3,    1.0E3,
4000.0, 100.0
**Elastic
**207000., 0.3
**
** BOUNDARY CONDITIONS
**
** Name: BC-1 Type: Symmetry/Antisymmetry/Encastre
*Boundary
sym, YSYMM
** ----------------------------------------------------------------
**
** STEP: Step-1
**
*Step, name=Step-1, nlgeom=YES
*Dynamic, Explicit
, 200.
*Bulk Viscosity
0.06, 1.2
**
** BOUNDARY CONDITIONS
**
** Name: BC-2 Type: Velocity/Angular velocity
*Boundary, user, type=VELOCITY
outer, 1, 1
outer, 2, 2
*Boundary
back, 3,3,0.0
*Boundary
front, 3,3,0.0
**
** OUTPUT REQUESTS
**
*Restart, write, number interval=1, time marks=NO
**
** FIELD OUTPUT: F-Output-1
**
*Output, field, variable=PRESELECT, time interval=5
*Element Output, directions=YES
LE, IE, EE, E, PE, PEEQ, PEMAG, S,EVOL, SDV
**
** HISTORY OUTPUT: H-Output-1
**
*Output, history, variable=PRESELECT
*Element Output, elset=sym
LE, S
*End Step
