*Heading
** Job name: single_SFE_11_slowly_load Model name: test_single_SFE_11_nosyscha_EandS
** Generated by: Abaqus/CAE 2016
*Preprint, echo=NO, model=NO, history=NO, contact=NO
**
** PARTS
**
*Part, name=TESS
*Node
      1,           0.,           0.
      2,  1.27390001e-06,           0.
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*Element, type=CPE4R
    1,     1,     2,   160,   159
    2,     2,     3,   161,   160
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*Elset, elset=FACE1, generate
     1,  14758,      1
*Nset, nset=X0, generate
     1,  14853,    158
*Nset, nset=X1, generate
   158,  15010,    158
*Nset, nset=Y0, generate
   1,  158,    1
*Nset, nset=Y1, generate
 14853,  15010,      1
*Elset, elset=_PICKEDSET7, internal, generate
     1,  14758,      1
** Section: Section-1-_PICKEDSET7
*Solid Section, elset=_PICKEDSET7, material=MATERIAL-1
,
*End Part
**
**
** ASSEMBLY
**
*Assembly, name=Assembly
**
*Instance, name=TESS-1, part=TESS
*End Instance
**
*End Assembly
*Amplitude, name=AMP-1
             0.,              0.,            0.01,           5e-05,            600.,           5e-05
**
** MATERIALS
**
*Material, name=MATERIAL-1
*Density
8900.,
*Depvar
    242,
*User Defined Field
*User Material, constants=60
 1.36e+11,    9.5e+10,      7e+10,         0.,         0.,         0.,      0.001,       0.05
         0.,      1000.,        70.,         4.,         1.,        1.4,     60000.,      1000.
      4000.,       100.,    1.4e+08,         1.,       300.,   2.56e-10,      1e+11,       0.09
        1.5,        1.2,         0.,      2e-05,       0.09,         1.,         1.,    1.2e+23
      2e-09,   1.32e+07,         0.,      0.042,         0.,      0.468,      1e-08,         2.
      3e-07,        0.3,      1e-09,       0.01,    2.6e-07,  1.678e-26,         5.,        0.2
       0.25,       0.77,     -10.79,      50.41,       13.9,       0.42,       4.32,      0.331
      1.875,      0.037, 0.00081054,        3.2
** ----------------------------------------------------------------
**
** STEP: Step-1
**
*Step, name=Step-1, nlgeom=YES
*Dynamic, Explicit
, 240.
*Bulk Viscosity
0.06, 1.2
** Mass Scaling: Semi-Automatic
**               Whole Model
*Fixed Mass Scaling, factor=1e+12
**
** BOUNDARY CONDITIONS
**
** Name: Disp-BC-1 Type: Displacement/Rotation
*Boundary
TESS-1.X0, 1, 1
** Name: Vel-BC-1 Type: Velocity/Angular velocity
*Boundary, amplitude=AMP-1, type=VELOCITY
TESS-1.X1, 1, 1, 0.0002
**
** OUTPUT REQUESTS
**
*Restart, write, number interval=1, time marks=NO
**
** FIELD OUTPUT: F-Output-1
**
*Output, field, number interval=200
*Node Output
A, RF, U, V
**
** FIELD OUTPUT: F-Output-2
**
*Contact Output
CSTRESS,
**
** FIELD OUTPUT: F-Output-3
**
*Element Output, directions=YES
EVF, LE, PE, PEEQ, PEEQVAVG, PEVAVG, S, SDV, SVAVG
**
** HISTORY OUTPUT: H-Output-1
**
*Output, history, variable=PRESELECT
*End Step
